# Momenter og udbøjning - Vind
# Givne vindlaster
h := 11700 mm
Q_k.v1 := 2.67*kN/m*0.3 = 0.801 kN/m
Q_k.v2 := 2.427*kN/m*0.3 = 0.7281 kN/m
Q_k.v4 := 0*kN/m*0.3 = 0 kN/m
Q_k.v5 := -0.543*kN/m*0.3 = -0.1629 kN/m
I := 482*10^6*mm^4
α := 50 deg
E := 210 GPa = 210000 MPa
a := 5800 mm/cos(α) = 9.0232 m
c := a/2/sin(α) = 5.88947 m
c/(a/2) = 1.30541
h_total := (h + c)/(c/(a/2)) = 13.4743 m
(sin(60.83 deg)*15431.04*mm) = 13.474 m
# Beregning af reaktionsligninger
M_A == 0
R_BV := 0 == R_BV*11600*mm - Q_k.v1*h^2*1/2 + Q_k.v5*h^2*1/2 - Q_k.v2*a*h_total + Q_k.v4*a*(sin(20.14 deg)*17475.61*mm) solve, R_BV → 8.62068965517e-20*(8.85234549345e19*kg*m^2 + 6.59741355e25*kg*mm^2)/(mm*s^2)
R_BV = 13.3188 kN
F_y == 0
R_AV := 0 == R_BV + R_AV - Q_k.v2*a*cos(α) - Q_k.v4*a*cos(α) solve, R_AV → -1e-19*(7.63133232194e19*kg*m^2 - 6.56979060635e22*kg*cos(50.0*deg)*m*mm + 5.68742547414e25*kg*mm^2)/(mm*s^2)
R_AV = -9.09578 kN
M_k == 0
R_BH := 0 == R_BV*5800*mm - R_BH*(h + sin(α)*a) - Q_k.v5*h*(h/2 + sin(α)*a) - Q_k.v4*a^2*1/2 solve, R_BH → (2.21308637336e21*kg*m^2 + 8.59879206865e23*kg*sin(50.0*deg)*m*mm + 2.2068379125e27*kg*mm^2)/(5.85e20*mm*s^2 + 4.5115990979e17*m*s^2*sin(50.0*deg))
R_BH = 5.45732 kN
F_x == 0
R_AH := 0 == R_AH - R_BH + Q_k.v1*h + Q_k.v2*a*sin(α) - Q_k.v4*a*sin(α) - Q_k.v5*h solve, R_AH → (2.21308637336e21*kg*m^2 + 8.59879206865e23*kg*sin(50.0*deg)*m*mm + 2.2068379125e27*kg*mm^2)/(5.85e20*mm*s^2 + 4.5115990979e17*m*s^2*sin(50.0*deg)) - 11277630*kg*mm/s^2 - 6569.79060635*kg*m*sin(50.0*deg)/s^2
R_AH = -10.8531 kN
# Opstilling af momenter
0 == M_1 + R_AH*x_1 + Q_k.v1*x_1^2*1/2
M_1(x_1) := -R_AH*x_1 - Q_k.v1*x_1^2*1/2
0 == M_2 - R_AV*cos(α)*x_2 + R_AH*(sin(α)*x_2 + 11700 mm) + Q_k.v1*11700*mm*(11700 mm/2 + sin(α)*x_2) + Q_k.v2*x_2^2*1/2
M_2(x_2) := R_AV*cos(α)*x_2 - R_AH*(sin(α)*x_2 + h) - Q_k.v1*h^2/2 - Q_k.v1*h*sin(α)*x_2 - Q_k.v2*x_2^2*1/2
0 == M_3 - R_BV*cos(α)*x_3 + R_BH*(sin(α)*x_3 + h) + Q_k.v5*h^2/2 + Q_k.v5*h*sin(α)*x_3 + Q_k.v.4*x_3^2*1/2
M_3(x_3) := R_BV*cos(α)*x_3 - R_BH*(sin(α)*x_3 + h) - Q_k.v5*h^2/2 - Q_k.v5*h*sin(α)*x_3 - Q_k.v4*x_3^2/2
0 == M_4 + R_BH*x_4 + Q_k.v5*x_4^2*1/2
M_4(x_4) := -R_BH - Q_k.v5*x_4^2*1/2
M_2(a) = 2.18279e-13 kN*m
M_3(a) = -2.72848e-14 kN*m
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# Integration af momentfunktionerne
M_1(x_1) == -R_AH*x_1 - Q_k.v1*x_1^2*1/2
v_1(x_1) == -R_AH*x_1^2/(2*E*I) - Q_k.v1*x_1^3/(2*3*E*I) + C_1
U_1(x_1) == -R_AH*x_1^3/(3*2*E*I) - Q_k.v1*x_1^4/(4*3*2*E*I) + C_1*x_1 + C_2
M_2(x_2) == R_AV*cos(α)*x_2 - R_AH*sin(α)*x_2 - R_AH*h - Q_k.v1*h^2/2 - Q_k.v1*h*sin(α)*x_2 - Q_k.v2*x_2^2*1/2
v_2(x_2) == R_AV*cos(α)*x_2^2/(2*E*I) - R_AH*sin(α)*x_2^2/(2*E*I) - R_AH*h*x_2/(E*I) - Q_k.v1*h^2*x_2/(2*E*I) - Q_k.v1*h*sin(α)*x_2^2/(2*E*I) - Q_k.v2*x_2^3/(3*2*E*I) + C_3
U_2(x_2) == R_AV*cos(α)*x_2^3/(3*2*E*I) - R_AH*sin(α)*x_2^3/(3*2*E*I) - R_AH*h*x_2^2/(2*E*I) - Q_k.v1*h^2*x_2^2/(2*2*E*I) - Q_k.v1*h*sin(α)*x_2^3/(3*2*E*I) - Q_k.v2*x_2^4/(4*3*2*E*I) + C_3*x_2 + C_4
M_3(x_3) == R_BV*cos(α)*x_3 - R_BH*(sin(α)*x_3 + h) - Q_k.v5*h*(h/2 + sin(α)*x_3) - Q_k.v4*x_3^2*1/2
v_3(x_3) == R_BV*cos(α)*x_3^2/(2*E*I) - R_BH*sin(α)*x_3^2/(2*E*I) - R_BH*h*x_3/(E*I) - h^2*Q_k.v5*x_3/(2*E*I) - Q_k.v5*h*sin(α)*x_3^2/(2*E*I) - Q_k.v4*x_3^3/(3*2*E*I) + C_5
U_3(x_3) == R_BV*cos(α)*x_3^3/(3*2*E*I) - R_BH*sin(α)*x_3^3/(3*2*E*I) - R_BH*h*x_3^2/(2*E*I) - h^2*Q_k.v5*x_3^2/(2*2*E*I) - Q_k.v5*h*sin(α)*x_3^3/(3*2*E*I) - Q_k.v4*x_3^4/(4*3*2*E*I) + C_5*x_3 + C_6
M_4(x_4) == -R_BH*x_4 - Q_k.v5*x_4^2*1/2
v_4(x_4) == -R_BH*x_4^2/(2*E*I) - Q_k.v5*x_4^3/(3*2*E*I) + C_7
U_4(x_4) == -R_BH*x_4^3/(3*2*E*I) - Q_k.v5*x_4^4/(4*3*2*E*I) + C_7*x_4 + C_8
# Randbetingelser - fra vejleder
U_1(0 mm) == 0
U_1(h) == U_2(0 mm)*(cos(α)/tan(α) + sin(α))
v_1(h) == v_2(0 mm)
w_2 == U_3(a)*sin(2*α) - w_3*cos(2*α)
U_2(a) == U_3(a)*cos(2*α) + w_3*sin(2*α)
U_4(h) == U_3(0 mm)*(cos(α)/tan(α) - sin(α))
v_4(h) == v_3(0 mm)
U_4(0 mm) == 0
# Kendte konstanter - fra vejleder
w_2 == -U_2(0 mm)/tan(α)
W_3 == -U_3(0 mm)/tan(α)
# De givne randbetingelser bruges
-R_AH*(0 mm)^3/(3*2*E*I) - Q_k.v1*(0 mm)^4/(4*3*2*E*I) + C_1*(0 mm) + C_2 == 0
-R_AH*h^3/(3*2*E*I) - Q_k.v1*h^4/(4*3*2*E*I) + C_1*h + C_2 == (R_AV*cos(α)*(0 mm)^3/(3*2*E*I) - R_AH*sin(α)*(0 mm)^3/(3*2*E*I) - R_AH*h*(0 mm)^2/(2*E*I) - Q_k.v1*h^2*(0 mm)^2/(2*2*E*I) - Q_k.v1*h*sin(α)*(0 mm)^3/(3*2*E*I) - Q_k.v2*(0 mm)^4/(4*3*2*E*I) + C_3*(0 mm) + C_4)*(cos(α)/tan(α) + sin(α))
-R_AH*h^2/(2*E*I) - Q_k.v1*h^3/(2*3*E*I) + C_1 == R_AV*cos(α)*(0 mm)^2/(2*E*I) - R_AH*sin(α)*(0 mm)^2/(2*E*I) - R_AH*h*(0 mm)/(E*I) - Q_k.v1*h^2*(0 mm)/(2*E*I) - Q_k.v1*h*sin(α)*(0 mm)^2/(2*E*I) - Q_k.v2*(0 mm)^3/(3*2*E*I) + C_3
-(R_AV*cos(α)*(0 mm)^3/(3*2*E*I) - R_AH*sin(α)*(0 mm)^3/(3*2*E*I) - R_AH*h*(0 mm)^2/(2*E*I) - Q_k.v1*h^2*(0 mm)^2/(2*2*E*I) - Q_k.v1*h*sin(α)*(0 mm)^3/(3*2*E*I) - Q_k.v2*(0 mm)^4/(4*3*2*E*I) + C_3*(0 mm) + C_4)/tan(α) == (R_BV*cos(α)*a^3/(3*2*E*I) - R_BH*sin(α)*a^3/(3*2*E*I) - R_BH*h*a^2/(2*E*I) - h^2*Q_k.v5*a^2/(2*2*E*I) - Q_k.v5*h*sin(α)*a^3/(3*2*E*I) - Q_k.v4*a^4/(4*3*2*E*I) + C_5*a + C_6)*sin(2*α) - (-(R_BV*cos(α)*(0 mm)^3/(3*2*E*I) - R_BH*sin(α)*(0 mm)^3/(3*2*E*I) - R_BH*h*(0 mm)^2/(2*E*I) - h^2*Q_k.v5*(0 mm)^2/(2*2*E*I) - Q_k.v5*h*sin(α)*(0 mm)^3/(3*2*E*I) - Q_k.v4*(0 mm)^4/(4*3*2*E*I) + C_5*(0 mm) + C_6)/tan(α))*cos(2*α)
R_AV*cos(α)*a^3/(3*2*E*I) - R_AH*sin(α)*a^3/(3*2*E*I) - R_AH*h*a^2/(2*E*I) - Q_k.v1*h^2*a^2/(2*2*E*I) - Q_k.v1*h*sin(α)*a^3/(3*2*E*I) - Q_k.v2*a^4/(4*3*2*E*I) + C_3*a + C_4 == (R_BV*cos(α)*a^3/(3*2*E*I) - R_BH*sin(α)*a^3/(3*2*E*I) - R_BH*h*a^2/(2*E*I) - h^2*Q_k.v5*a^2/(2*2*E*I) - Q_k.v5*h*sin(α)*a^3/(3*2*E*I) - Q_k.v4*a^4/(4*3*2*E*I) + C_5*a + C_6)*cos(2*α) + (-(R_BV*cos(α)*(0 mm)^3/(3*2*E*I) - R_BH*sin(α)*(0 mm)^3/(3*2*E*I) - R_BH*h*(0 mm)^2/(2*E*I) - h^2*Q_k.v5*(0 mm)^2/(2*2*E*I) - Q_k.v5*h*sin(α)*(0 mm)^3/(3*2*E*I) - Q_k.v4*(0 mm)^4/(4*3*2*E*I) + C_5*(0 mm) + C_6)/tan(α))*sin(2*α)
-R_BH*h^3/(3*2*E*I) - Q_k.v5*h^4/(4*3*2*E*I) + C_7*h + C_8 == (R_BV*cos(α)*(0 mm)^3/(3*2*E*I) - R_BH*sin(α)*(0 mm)^3/(3*2*E*I) - R_BH*h*(0 mm)^2/(2*E*I) - h^2*Q_k.v5*(0 mm)^2/(2*2*E*I) - Q_k.v5*h*sin(α)*(0 mm)^3/(3*2*E*I) - Q_k.v4*(0 mm)^4/(4*3*2*E*I) + C_5*(0 mm) + C_6)*(cos(α)/tan(α) - sin(α))
-R_BH*h^2/(2*E*I) - Q_k.v5*h^3/(3*2*E*I) + C_7 == R_BV*cos(α)*(0 mm)^2/(2*E*I) - R_BH*sin(α)*(0 mm)^2/(2*E*I) - R_BH*h*(0 mm)/(E*I) - h^2*Q_k.v5*(0 mm)/(2*E*I) - Q_k.v5*h*sin(α)*(0 mm)^2/(2*E*I) - Q_k.v4*(0 mm)^3/(3*2*E*I) + C_5
-R_BH*(0 mm)^3/(3*2*E*I) - Q_k.v5*(0 mm)^4/(4*3*2*E*I) + C_7*(0 mm) + C_8 == 0
# Randbetingelser bruges - reduceret
Given
C_2 == 0
-R_AH*h^3/(3*2*E*I) - Q_k.v1*h^4/(4*3*2*E*I) + C_1*h + C_2 == C_4*(cos(α)/tan(α) + sin(α))
-R_AH*h^2/(2*E*I) - Q_k.v1*h^3/(2*3*E*I) + C_1 == C_3
-C_4/tan(α) == (R_BV*cos(α)*a^3/(3*2*E*I) - R_BH*sin(α)*a^3/(3*2*E*I) - R_BH*h*a^2/(2*E*I) - h^2*Q_k.v5*a^2/(2*2*E*I) - Q_k.v5*h*sin(α)*a^3/(3*2*E*I) - Q_k.v4*a^4/(4*3*2*E*I) + C_5*a + C_6)*sin(2*α) - (-C_6/tan(α))*cos(2*α)
R_AV*cos(α)*a^3/(3*2*E*I) - R_AH*sin(α)*a^3/(3*2*E*I) - R_AH*h*a^2/(2*E*I) - Q_k.v1*h^2*a^2/(2*2*E*I) - Q_k.v1*h*sin(α)*a^3/(3*2*E*I) - Q_k.v2*a^4/(4*3*2*E*I) + C_3*a + C_4 == (R_BV*cos(α)*a^3/(3*2*E*I) - R_BH*sin(α)*a^3/(3*2*E*I) - R_BH*h*a^2/(2*E*I) - h^2*Q_k.v5*a^2/(2*2*E*I) - Q_k.v5*h*sin(α)*a^3/(3*2*E*I) - Q_k.v4*a^4/(4*3*2*E*I) + C_5*a + C_6)*cos(2*α) + (-C_6/tan(α))*sin(2*α)
-R_BH*h^3/(3*2*E*I) - Q_k.v5*h^4/(4*3*2*E*I) + C_7*h + C_8 == C_6*(cos(α)/tan(α) - sin(α))
-R_BH*h^2/(2*E*I) - Q_k.v5*h^3/(3*2*E*I) + C_7 == C_5
C_8 == 0
[C_1; C_2; C_3; C_4; C_5; C_6; C_7; C_8] := Find(C_1, C_2, C_3, C_4, C_5, C_6, C_7, C_8)  # error: The symbolic result returned is too large to display, but it can be used in subsequent calculations if assigned to a function or variable.
C_1 = -0.0151394
C_2 = 0
C_3 = -0.00991289
C_4 = -0.118498 m
C_5 = -0.00598259
C_6 = 0.198438 m
C_7 = -0.00272195
C_8 = 0
U_1(x_1) := -R_AH*x_1^3/(3*2*E*I) - Q_k.v1*x_1^4/(4*3*2*E*I) + C_1*x_1 + C_2
U_2(x_2) := R_AV*cos(α)*x_2^3/(3*2*E*I) - R_AH*sin(α)*x_2^3/(3*2*E*I) - R_AH*h*x_2^2/(2*E*I) - Q_k.v1*h^2*x_2^2/(2*2*E*I) - Q_k.v1*h*sin(α)*x_2^3/(3*2*E*I) - Q_k.v2*x_2^4/(4*3*2*E*I) + C_3*x_2 + C_4
U_3(x_3) := R_BV*cos(α)*x_3^3/(3*2*E*I) - R_BH*sin(α)*x_3^3/(3*2*E*I) - R_BH*h*x_3^2/(2*E*I) - h^2*Q_k.v5*x_3^2/(2*2*E*I) - Q_k.v5*h*sin(α)*x_3^3/(3*2*E*I) - Q_k.v4*x_3^4/(4*3*2*E*I) + C_5*x_3 + C_6
U_4(x_4) := -R_BH*x_4^3/(3*2*E*I) - Q_k.v5*x_4^4/(4*3*2*E*I) + C_7*x_4 + C_8
U_1(0 mm) = 0 mm
U_3(0) = 198.438 mm
U_1(h) = -154.688 mm
U_3(a) = 130.325 mm
U_2(0 mm) = -118.498 mm
U_4(0 mm) = 0 mm
U_2(a) = -186.61 mm
U_4(h) = -44.9822 mm
# Kurver
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